// COMSOL Multiphysics 5.6.0.341 model "Gas_Sensor.mph"
// Outline of the model tree

Parameters
  p = 1[atm]  // Air pressure
  T = 25[degC]  // Air temperature
  c0 = 100  // DCM Concentration in ppm
  c_DCM_air = 1e-6*c0*p/(R_const*T)  // DCM concentration in air
  M_DCM = 84.93[g/mol]  // Molar mass of DCM
  K = 10^1.4821  // PIB/air partition constant for DCM
  rho_DCM_PIB = K*M_DCM*c_DCM_air  // Mass concentration of DCM in PIB
  rho_PIB = 0.918[g/cm^3]  // Density of PIB
  E_PIB = 10[GPa]  // Young's modulus of PIB
  nu_PIB = 0.48  // Poisson's ratio of PIB
  eps_PIB = 2.2  // Relative permittivity of PIB
  switch = 0  // Switch for adding DCM density
  vR = 3488[m/s]  // Rayleigh wave velocity
  width = 4[um]  // Width of unit cell
  f0 = vR/width  // Estimated SAW frequency
  t_PIB = 0.5[um]  // PIB thickness

Common definitions
  mpf1: ParticipationFactors

Geometry
  geom1 "Geometry 1" (2D, length unit µm)
    r1: Rectangle | layername = Layer 1; layer = t_PIB; layerbottom = off; layertop = on; size = {width, 3*width + t_PIB}
    r2: Rectangle "IDT" | pos = {width/8, 3*width}; size = {width/4, 0.4*t_PIB}
    copy1: Copy | input = r2; keep = on; displx = width/2; disply = 0
    fin: Finalize "Form Union"

Materials
  mat1: Common "LiNbO3" on domains 1
    def "Basic"
      density = 4647
    StressCharge "Stress-charge form"
      cE = {242.4[GPa], 75.2[GPa], 75.2[GPa], 0, 0, 0, 75.2[GPa], 203[GPa], 57.3[GPa], 0, 8.5[GPa], 0, 75.2[GPa], 57.3[GPa], 203[GPa], 0, -8.5[GPa], 0, 0, 0, 0, 75.2[GPa], 0, 8.5[GPa], 0, 8.5[GPa], -8.5[GPa], 0, 59.5[GPa], 0, 0, 0, 0, 8.5[GPa], 0, 59.5[GPa]}
      eES = {1.33, 0, 0, 0.23, 0, -2.5, 0.23, 0, 2.5, 0, -2.5, 0, 0, 0, 3.7, 0, 3.7, 0}
      epsilonrS = diag{28.7, 85.2, 85.2}
      eta_cE = {0, 0, 0, 0, 0, 0, 0, 0, 0, 0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}
      eta_eES = {0, 0, 0, 0, 0, 0, 0, 0, 0, 0, 0, 0, 0, 0, 0, 0, 0, 0}
      eta_epsilonS = 0
  mat2: Common "Material 2" on domains 2
    def "Basic"
      density = rho_PIB+switch*rho_DCM_PIB
      youngsmodulus = E_PIB
      poissonsratio = nu_PIB
      relpermittivity = eps_PIB
  mat3: Common "Aluminum" on domains 3, 4
    def "Basic"
      relpermeability = 1
      heatcapacity = 900[J/(kg*K)]
      thermalconductivity = 238[W/(m*K)]
      electricconductivity = 3.774e7[S/m]
      relpermittivity = 1
      thermalexpansioncoefficient = 23e-6[1/K]
      density = 2700[kg/m^3]
    Enu "Young's modulus and Poisson's ratio"
      youngsmodulus = 70e9[Pa]
      poissonsratio = 0.33
    Murnaghan
      l = -2.5e11[Pa]
      m = -3.3e11[Pa]
      n = -3.5e11[Pa]
    Lame "Lamé parameters"
      lambLame = 5.1e10[Pa]
      muLame = 2.6e10[Pa]

Physics
  solid: SolidMechanics on all domains
    dependent variable u = {u, v, w}
    lemm1: LinearElasticModel "Linear Elastic Material 1" (default)
    free1: Free (default)
    init1: init "Initial Values 1" (default)
    pzm1: PiezoelectricMaterialModel "Piezoelectric Material 1" on domains 1
  es: Electrostatics on domains 1, 2
    dependent variable V
    ccn1: ChargeConservation (default)
    zc1: ZeroCharge (default)
    init1: init "Initial Values 1" (default)
    ccnp1: ChargeConservationPiezo "Charge Conservation, Piezoelectric 1" on domains 1

Multiphysics
  pze1: PiezoelectricEffect on all domains | Solid_physics = solid; Electrostatics_physics = es

Mesh
  mesh1 "Mesh 1" (physics-controlled)

Studies
  std1 "Study 1"
    eig: Eigenfrequency | shift = 1[Hz]; conrad = 1